// SBML level 2 version 4

model New_Model_1_1()

  // Compartments:
  compartment Intracellular = 1;

  // Species:
  species Glucose in Intracellular = 100;
  species Oxygen in Intracellular = 100;
  species Energy in Intracellular = 450;
  species Lactate in Intracellular = 0;
  species apoptosis_rate in Intracellular = 0;
  species migration_speed in Intracellular = 0;
  species Lac_Secretion_Rate in Intracellular = 0;
  species Transition_Rate in Intracellular = 0;
  species NAD in Intracellular = 120;
  species NADH in Intracellular = 120;
  species Pyr in Intracellular = 120;

  // Parameters:
  k_aer = 0.01;
  k_ane = 0.00018; k_ane is "k_ana";
  k_usage = 0.0023; k_usage is "k_ene";
  energy_death_thresh = 430;
  energy_prolif_thresh = 445;
  k_gly = 0;
  k_prolif = 0;

  // Reactions:
  Aerobic: Glucose + 6 Oxygen => 38 Energy; Intracellular*k_aer*Glucose*Oxygen^6;
  Anaerobic: Glucose => 2 Energy + Lactate; Intracellular*k_ane*Glucose;
  Energy_Usage: Energy => ; Intracellular*k_usage*Energy; Energy_Usage is "Energy_disipation";

  // Events:
  die: at (Energy < energy_death_thresh): apoptosis_rate = 9e99;
  Lac_Sec: at (Lactate > 0.01): Lac_Secretion_Rate = 0.0001;
  divide: at (Energy > energy_prolif_thresh): Transition_Rate = k_prolif;
  do_not_divide: at (Energy < energy_prolif_thresh): Transition_Rate = 0;
  Lac_Sec00: at (Lactate < 0): Lac_Secretion_Rate = 0;

  // Unit definitions:
  unit length = 1e-6 metre;
  unit area = (1e-6 metre)^2;
  unit volume = 1e-3 litre;
  unit time = 0.06 second;
  unit substance = 1e-3 mole;
end
