// SBML level 2 version 4

model New_Model_1_1_1()

  // Compartments:
  compartment Intracellular = 1;

  // Species:
  species Glucose in Intracellular = 100;
  species Oxygen in Intracellular = 100;
  species Energy in Intracellular = 1000;
  species Lactate in Intracellular = 0;
  species apoptosis_rate in Intracellular = 0;
  species migration_speed in Intracellular = 0;
  species Lac_Secretion_Rate in Intracellular = 0;
  species Transition_Rate in Intracellular = 0;
  species NAD in Intracellular = 100;
  species NADH in Intracellular = 100;
  species Pyr in Intracellular = 100;

  // Parameters:
  k_aer = 7.382813e8;
  k_ane = 1.171875e7; k_ane is "k_ana";
  k_usage = 160156.3; k_usage is "k_ene";
  energy_death_thresh = 894.6367;
  energy_prolif_thresh = 26960.43;
  k_gly = 4.179688e8;
  k_prolif = 4.960988;
  Initial_for_energy_death_thresh = energy_death_thresh;

  // Reactions:
  Aerobic: Pyr + NADH + 3 Oxygen => NAD + 17 Energy; Intracellular*k_aer*Pyr*NADH*Oxygen^3;
  Anaerobic: Pyr + NADH => Lactate + NAD; Intracellular*k_ane*Pyr*NADH;
  Energy_Usage: Energy => ; Intracellular*k_usage*Energy; Energy_Usage is "Energy_disipation";
  Glycolysis: Glucose + 2 NAD => 2 Pyr + 2 Energy + 2 NADH; Intracellular*k_gly*Glucose*NAD^2;

  // Events:
  die: at (Energy < Initial_for_energy_death_thresh): apoptosis_rate = 9e99;
  Lac_Sec: at (Lactate > 1): Lac_Secretion_Rate = 0.0001;
  divide: at (Energy > energy_prolif_thresh): Transition_Rate = k_prolif;
  do_not_divide: at (Energy < energy_prolif_thresh): Transition_Rate = 0;
  Lac_Sec00: at (Lactate < 0): Lac_Secretion_Rate = 0;
  move: at (Energy > energy_prolif_thresh): migration_speed = 5;
  do_not_move: at (Energy < energy_prolif_thresh): migration_speed = 0;
  Lac_0: at (Lactate < 0): Lactate = 0;
  do_not_die: at (Energy > Initial_for_energy_death_thresh): apoptosis_rate = 0;

  // Unit definitions:
  unit length = 1e-6 metre;
  unit area = (1e-6 metre)^2;
  unit volume = 1e-3 litre;
  unit time = 0.06 second;
  unit substance = 1e-3 mole;
end
